# Worksheet setting: ORIGIN = 1
A := [
    0.085, 0.068, 0.950, 0.800;
    0.070, 0.500, 0.133, 0.425;
    1.750, 0.567, 0.094, 0.283;
    0.049, 0.900, 0.233, 0.425
]
B := [10.806; 7.888; 36.306; 11.604]
ORIGIN := 1
Δ := |A|
Δ = 0.266896
Δ1 := |augment(B, submatrix(A, 1, 4, 2, 4))|
Δ1 = 4.54331
Δ2 := |augment(submatrix(A, 1, 4, 1, 1), B, submatrix(A, 1, 4, 3, 4))|
Δ2 = 2.30757
Δ3 := |augment(submatrix(A, 1, 4, 1, 2), B, submatrix(A, 1, 4, 4, 4))|
Δ3 = 1.64167
Δ4 := |augment(submatrix(A, 1, 4, 1, 3), B)|
Δ4 = 0.976744
x1 := Δ1/Δ
x1 = 17.0228
x2 := Δ2/Δ
x2 = 8.64595
x3 := Δ3/Δ
x3 = 6.15097
x4 := Δ4/Δ
x4 = 3.65965
Ar := augment(A, B)
Ar = [
    0.085, 0.068, 0.95, 0.8, 10.806;
    0.07, 0.5, 0.133, 0.425, 7.888;
    1.75, 0.567, 0.094, 0.283, 36.306;
    0.049, 0.9, 0.233, 0.425, 11.604
]
Ag := rref(Ar)
Ag = [1, 0, 0, 0, 17.0228; 0, 1, 0, 0, 8.64595; 0, 0, 1, 0, 6.15097; 0, 0, 0, 1, 3.65965]
x5 := submatrix(Ag, 1, 4, 5, 5)
x5 = [17.0228; 8.64595; 6.15097; 3.65965]
A*x5 = [10.806; 7.888; 36.306; 11.604]
x6 := A^-1*B
x6 = [17.0228; 8.64595; 6.15097; 3.65965]
A*x6 = [10.806; 7.888; 36.306; 11.604]
x7 := lsolve(A, B)
x7 = [17.0228; 8.64595; 6.15097; 3.65965]
A*x7 = [10.806; 7.888; 36.306; 11.604]
