# Worksheet setting: ORIGIN = 1
A := [
    0.070, 0.056, 0.800, 0.650;
    0.040, 0.400, 0.093, 0.350;
    1.450, 0.467, 0.093, 0.264;
    0.040, 0.750, 0.133, 0.350
]
B := [7.380; 5.021; 24.926; 7.657]
ORIGIN := 1
Δ := |A|
Δ = 0.122758
Δ1 := |augment(B, submatrix(A, 1, 4, 2, 4))|
Δ1 = 1.71843
Δ2 := |augment(submatrix(A, 1, 4, 1, 1), B, submatrix(A, 1, 4, 3, 4))|
Δ2 = 0.859181
Δ3 := |augment(submatrix(A, 1, 4, 1, 2), B, submatrix(A, 1, 4, 4, 4))|
Δ3 = 0.571939
Δ4 := |augment(submatrix(A, 1, 4, 1, 3), B)|
Δ4 = 0.43077
x1 := Δ1/Δ
x1 = 13.9985
x2 := Δ2/Δ
x2 = 6.99896
x4 := Δ4/Δ
x4 = 3.50909
x3 := Δ3/Δ
x3 = 4.65907
Ar := augment(A, B)
Ar = [
    0.07, 0.056, 0.8, 0.65, 7.38;
    0.04, 0.4, 0.093, 0.35, 5.021;
    1.45, 0.467, 0.093, 0.264, 24.926;
    0.04, 0.75, 0.133, 0.35, 7.657
]
Ag := rref(Ar)
Ag = [1, 0, 0, 0, 13.9985; 0, 1, 0, 0, 6.99896; 0, 0, 1, 0, 4.65907; 0, 0, 0, 1, 3.50909]
x5 := submatrix(Ag, 1, 4, 5, 5)
x5 = [13.9985; 6.99896; 4.65907; 3.50909]
A*x5 = [7.38; 5.021; 24.926; 7.657]
x6 := A^-1*B
x6 = [13.9985; 6.99896; 4.65907; 3.50909]
A*x6 = [7.38; 5.021; 24.926; 7.657]
x7 := lsolve(A, B)
x7 = [13.9985; 6.99896; 4.65907; 3.50909]
A*x7 = [7.38; 5.021; 24.926; 7.657]
