f(x) := cos(x)/(1 + cos(x) - sin(x))
integral(f(x), x) → ln(tan(x/2)^2 + 1)/2 + atan(tan(x/2))
F(x) := ln(tan(x/2)^2 + 1)/2 + atan(tan(x/2))
d/dx(F(x)) → (tan(x/2)^2/2 + 1/2)/(tan(x/2)^2 + 1) + tan(x/2)*(tan(x/2)^2/2 + 1/2)/(tan(x/2)^2 + 1)
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f(x) := x^2 - 4*x + 4
a := 2
b := 4
integral(f(x), x = b .. a) → -8/3
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S1(N) := sum(f(a + i*(b - a)/N)*(b - a)/N, i = 0 .. N - 1)
limit(S1(N), N → ∞) → 8/3
Sr(N) := sum((f(a + i + 1)*(b - a)/N)*(b - a)/N, i = 0 .. N - 1)
limit(Sr(N), N → ∞) → ∞
f(x) := sqrt((9 - 2*x)/(2*x - 21))
a := 6
b := 9
integral(f(x), x = b .. a) → -3i*ln(1 + sqrt(3)*1i) - 3i*ln(-1 + sqrt(3)*1i/3) + 3i*ln(1 + sqrt(3)*1i/3) + 3i*ln(-1 + sqrt(3)*1i)
