ORIGIN := 1
X := [
    0.085, 0.068, 0.950, 0.800;
    0.070, 0.500, 0.133, 0.425;
    1.750, 0.567, 0.094, 0.283;
    0.049, 0.900, 0.233, 0.425
]
B := [10.806; 7.888; 36.306; 11.604]
Δ := |X|
Δ = 0.266896
Δ1 := |augment(B*submatrix(A, 1, 4, 2, 4))|  # error: Значение должно быть матрицей.
