f(x) := sin(x)/(1 + cos(x) - sin(x))^2
integral(f(x), x) → ln(tan(x/2) - 1) - 1/(tan(x/2) - 1)
F(x) := ln(tan(x/2) - 1) - 1/(tan(x/2) - 1)
d/dx(F(x)) → (tan(x/2)^2/2 + 1/2)/(tan(x/2) - 1) + (tan(x/2)^2/2 + 1/2)/(tan(x/2) - 1)^2
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f(x) := x^2 - 100
a := 5
b := 10
integral(f(x), x = b .. a) → 625/3
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S1(N) := sum(f(a + i*(b - a)/N)*(b - a)/N, i = 0 .. N - 1)
limit(S1(N), N → ∞) → -625/3
Sr(N) := sum((f(a + i + 1)*(b - a)/N)*(b - a)/N, i = 0 .. N - 1)
limit(Sr(N), N → ∞) → ∞
f(x) := 1/(9 + x^2)^(3/2)
a := 0
b := 3
integral(f(x), x = b .. a) → -sqrt(2)/18
