x := [1; 1.5; 2; 2.5; 3; 3.5; 4]
y := [4.11; 4.16; 4.23; 4.29; 4.36; 4.42; 4.53]
Mx := mean(x)
My := mean(y)
Mx = 2.5
My = 4.3
Dy := var(y)
Dx := var(x)
Dy = 0.0188
Dx = 1
Gx := 1.064*Dx^(1/2)
Gy := 1.064*Dy^(1/2)
Gy = 0.145888
Gx = 1.064
Vx := (Gx/Mx)*100
Vy := (Gy/My)*100
Vx = 42.56
Vy = 3.39275
i := 0 .. 5
R1 := sum((x[i] - Mx)*(y[i] - My), i)/(6 - 1)*Gx*Gy
R1 = 0.0189375
(|R1|*sqrt(6 - 2))/sqrt(1 - R1^2) = 0.0378817
g(z) := linterp(x, y, z)
g(1) = 4.11
g(1.4) = 4.15
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S := cspline(x, y)
g(z) := interp(S, x, y, z)
g(1) = 4.11
g(1.) = 4.11
f(z, a, b) := a + b*e^(0.1*z)
d/da(f(z, a, b)) → 1
d/db(f(z, a, b)) → e^(0.1*z)
VS := [1; 1]
F(z, k) := [k[0] + k[1]*z; 1; z]
coeff := genfit(x, y, VS, F)
coeff = [3.95893; 0.136429]
