origin := 1
Given
2*sqrt(y(x)) == y'(x)
y(0) == 1
Y := Odesolve(x, 3)
x := 0, 0.01 .. 3
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ORIGIN := 1
y[1] := 1
D(x, y) := 2*sqrt(y[1])
Y4 := rkfixed(y, 0, 3, 20, D)
Y4 = [
    0, 1;
    0.15, 1.3225;
    0.3, 1.68999;
    0.45, 2.10249;
    0.6, 2.55999;
    0.75, 3.06249;
    0.9, 3.60999;
    1.05, 4.20249;
    1.2, 4.83998;
    1.35, 5.52248;
    1.5, 6.24998;
    1.65, 7.02248;
    1.8, 7.83998;
    1.95, 8.70248;
    2.1, 9.60998;
    2.25, 10.5625;
    2.4, 11.56;
    2.55, 12.6025;
    2.7, 13.69;
    2.85, 14.8225;
    3, 16
]
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