ORIGIN := 1
f(x) := 46*x[1] + 2.3*x[2] + 9.4*x[3] - 4*x[5]
x[5] := 0
Given
3*x[1] + 7.8*x[3] + 12*x[4] + 9*x[5] ≥ 49
2.3*x[2] + 5*x[3] + 5.6*x[4] - x[5] ≤ 86
16*x[1] - 40*x[4] + 29*x[5] == 50
190*x[1] - 98*x[2] - 4*x[4] + 150*x[5] ≥ 300
x[1] ≥ 0
x[2] ≥ 0
x[3] ≥ 0
x[4] ≥ 0
x[5] ≥ 0
f = ƒ([any1]) → any1
x = [0; 0; 0; 0; 0]
Maximize(f, x) = [41.5179; 0; 0; 15.3571; 0]
