ORIGIN := 1
f(x) := x[1] + 4*x[3] + 8*x[4] - 12*x[5]
x[5] := 0
Given
x[1] + 9*x[2] + 2*x[3] - 4*x[4] == 250
0.4*x[1] + x[2] - 5*x[3] + 3*x[4] + 8*x[5] ≤ 460
0.5*x[1] + 10*x[2] - 8*x[3] + 6*x[4] + 2*x[5] ≤ 190
11*x[2] - 8.5*x[3] + 3*x[4] + 2*x[5] == 210
x[1] ≥ 0
x[2] ≥ 0
x[3] ≥ 0
x[4] ≥ 0
x[5] ≥ 0
f = ƒ([any1]) → any1
x = [0; 0; 0; 0; 0]
Maximize(f, x) = [0; 25.9736; 9.07591; 0.478548; 0]
